echo            both
log             ../DEM/log.liggghts_init
atom_style      superquadric
atom_modify     map array
communicate     single vel yes
boundary        m m m
newton          off
units           si
processors      2 2 1

region          reg block -0.015 0.015 -0.015 0.015 0.0 0.0553 units box
create_box      1 reg

neighbor        0.001 bin
neigh_modify    delay 0

fix  m1 all property/global youngsModulus peratomtype 5.e6
fix  m2 all property/global poissonsRatio peratomtype 0.45
fix  m3 all property/global coefficientRestitution peratomtypepair 1 0.3
fix  m4 all property/global coefficientFriction peratomtypepair 1 0.5

pair_style  gran model hertz tangential history surface superquadric
pair_coeff  * *

timestep    0.00001
fix         gravi all gravity 9.81 vector 0.0 0.0 -1.0

fix  zwalls1  all wall/gran model hertz tangential history surface superquadric primitive type 1 zplane 0.0
fix  zwalls2  all wall/gran model hertz tangential history surface superquadric primitive type 1 zplane 0.0553
fix  cylwalls all wall/gran model hertz tangential history surface superquadric primitive type 1 zcylinder 0.01385 0. 0.

# c/a = 2 prolate spheroids: a=b=0.6785 mm, c=1.357 mm  (dEq ~ 1.71 mm)
fix  pts1 all particletemplate/superquadric 15485863 atom_type 1 density constant 2000 shape constant 0.0006785 0.0006785 0.001357 blockiness constant 2.0 2.0
fix  pdd1 all particledistribution/discrete 32452843 1 pts1 1.0

region insReg cylinder z 0.0 0.0 0.0115 0.010 0.050 units box
fix ins all insert/pack seed 32452867 distributiontemplate pdd1 insert_every once overlapcheck yes all_in yes particles_in_region 100 region insReg

fix  integr all nve/superquadric integration_scheme 1

thermo_style    custom step atoms ke
thermo          1000
thermo_modify   lost ignore norm no

run     20000 upto
write_restart   ../DEM/post/restart/liggghts.restart
