echo            both
log             ../DEM/log.liggghts
atom_style      superquadric
atom_modify     map array
communicate     single vel yes
boundary        m m m
newton          off
units           si
processors      2 2 1

read_restart    ../DEM/post/restart/liggghts.restart

neighbor        0.001 bin
neigh_modify    delay 0

fix  m1 all property/global youngsModulus peratomtype 5.e6
fix  m2 all property/global poissonsRatio peratomtype 0.45
fix  m3 all property/global coefficientRestitution peratomtypepair 1 0.3
fix  m4 all property/global coefficientFriction peratomtypepair 1 0.5

pair_style  gran model hertz tangential history surface superquadric
pair_coeff  * *

timestep    0.00001
fix         gravi all gravity 9.81 vector 0.0 0.0 -1.0

fix  zwalls1  all wall/gran model hertz tangential history surface superquadric primitive type 1 zplane 0.0
fix  zwalls2  all wall/gran model hertz tangential history surface superquadric primitive type 1 zplane 0.0553
fix  cylwalls all wall/gran model hertz tangential history surface superquadric primitive type 1 zcylinder 0.01385 0. 0.

# cfd coupling
fix  cfd  all couple/cfd couple_every 100 mpi
fix  cfd2 all couple/cfd/force/implicit

fix  integr all nve/superquadric integration_scheme 1

compute  centerOfMass all com
variable time equal step*dt

thermo_style    custom step atoms ke c_centerOfMass[3]
thermo          10
thermo_modify   lost ignore norm no

dump  dmp all custom 5000 ../DEM/post/dump*.liggghts_run id type x y z vx vy vz fx fy fz

run   0
