echo            both
log             ../DEM/log.liggghts
atom_style      superquadric
atom_modify     map array
communicate     single vel yes
boundary        f f f
newton          off
units           si
processors      2 2 1

read_restart    ../DEM/post/restart/liggghts.restart
neighbor        0.001 bin
neigh_modify    delay 0

fix  m1 all property/global youngsModulus peratomtype 5.e6
fix  m2 all property/global poissonsRatio peratomtype 0.45
fix  m3 all property/global coefficientRestitution peratomtypepair 1 0.3
fix  m4 all property/global coefficientFriction peratomtypepair 1 0.5

pair_style  gran model hertz tangential history surface superquadric
pair_coeff  * *
timestep    0.00001
# still no integrator: particle stays put; dragforce is recorded anyway

fix  cfd  all couple/cfd couple_every 100 mpi
fix  cfd2 all couple/cfd/force/implicit

compute  drg all reduce update_on_run_end yes sum f_dragforce[1] f_dragforce[2] f_dragforce[3]
variable time equal step*dt
variable Fx equal c_drg[1]
variable Fy equal c_drg[2]
variable Fz equal c_drg[3]
fix pr all print 100 "${time} ${Fx} ${Fy} ${Fz}" file ../DEM/post/forces_v1.txt title "# t Fx Fy Fz"

thermo_style    custom step atoms c_drg[3]
thermo          100
thermo_modify   lost ignore norm no
run 0
