# V3 init: one spheroid at centre, axis 45 deg in shear (x-z) plane
echo            both
log             ../DEM/log.liggghts_init
atom_style      superquadric
atom_modify     map array
communicate     single vel yes
boundary        p p f
newton          off
units           si
processors      2 2 1

region          reg block -0.01 0.01 -0.01 0.01 -0.01 0.01 units box
create_box      1 reg
neighbor        0.001 bin
neigh_modify    delay 0

fix  m1 all property/global youngsModulus peratomtype 5.e6
fix  m2 all property/global poissonsRatio peratomtype 0.45
fix  m3 all property/global coefficientRestitution peratomtypepair 1 0.3
fix  m4 all property/global coefficientFriction peratomtypepair 1 0.5

pair_style  gran model hertz tangential history surface superquadric
pair_coeff  * *
timestep    0.00001

fix pts1 all particletemplate/superquadric 15485863 atom_type 1 density constant 2000 shape constant 0.0006785 0.0006785 0.001357 blockiness constant 2.0 2.0
fix pdd1 all particledistribution/discrete 32452843 1 pts1 1.0
region insReg block -0.004 0.004 -0.004 0.004 -0.004 0.004 units box
fix ins all insert/pack seed 32452867 distributiontemplate pdd1 insert_every once overlapcheck yes all_in yes particles_in_region 1 region insReg

thermo_style    custom step atoms
thermo          50
run             200

group free type 1
set group free quat 0 1 0 45

dump q free custom 1 ../DEM/quat_check.txt id quat1 quat2 quat3 quat4
run 0
write_restart   ../DEM/post/restart/liggghts.restart
